# OpenSim document version 40000
MarkerSet:
  Marker STERN: torso (0.09480479 0.2480992 0.0009826448)
  Marker RSHO: torso (-0.00398348 0.3444293 0.1378444)
  Marker LSHO: torso (-0.002436247 0.3566495 -0.1371325)
  Marker HEAD: torso (0.07356915 0.5620059 0.01042365)
  Marker RASI: pelvis (0.01894082 0.02277116 0.1053435)
  Marker LASI: pelvis (0.02288906 0.0133201 -0.1062414)
  Marker T10: torso (-0.1036189 0.1776885 0.00217377)
  Marker RHIP: pelvis (-0.05813665 0.003477402 0.1401931)
  Marker RTHI: femur_r (0.01371456 -0.134001 0.05949728)
  Marker RKNE: femur_r (-0.004065354 -0.3541188 0.04814273)
  Marker RTIB: tibia_r (0.04641111 -0.1766023 0.03189096)
  Marker RANK: talus_r (-0.006047526 -0.004514476 0.04483162)
  Marker RHEE: calcn_r (-0.01301426 0.006700518 0.006342787)
  Marker RTOE: toes_r (0.02754396 0.0007125129 0.0004710856)
  Marker LHIP: pelvis (-0.05048389 -0.0057946 -0.1515269)
  Marker LTHI: femur_l (0.01253076 -0.1991135 -0.06215975)
  Marker LKNE: femur_l (-0.006879426 -0.3598926 -0.05183764)
  Marker LTIB: tibia_l (0.04320022 -0.1972915 -0.01782492)
  Marker LANK: tibia_l (-0.02601526 -0.3379076 -0.02383513)
  Marker LHEE: calcn_l (-0.01125387 0.005672028 -0.007453966)
  Marker LTOE: toes_l (0.01847372 0.003252995 0.005423577)
  Marker C7: torso (-0.05963631 0.3817592 0.003684783)
  Marker RPSI: torso (-0.04773089 0.007101764 0.03960477)
  Marker LPSI: torso (-0.05019146 0.008679339 -0.03863413)
