# OpenSim document version 20302
CMCTool Model2392_S2:
  replace_force_set: false
  force_set_files: gait2392_CMC_Actuators.xml
  results_directory: experiment/CMC/ResultsCMC/S2
  output_precision: 20
  initial_time: 2.5
  final_time: 3.5
  solve_for_equilibrium_for_auxiliary_states: true
  maximum_number_of_integrator_steps: 30000
  maximum_integrator_step_size: 1
  minimum_integrator_step_size: 0.00000001
  integrator_error_tolerance: 0.000001
  desired_kinematics_file: experiment/Inverse Kinematics/S2_T_01_fixed_ik_1cycle.mot
  task_set_file: gait2392_CMC_Tasks.xml
  lowpass_cutoff_frequency: -10
  cmc_time_window: 0.01
  use_curvature_filter: false
  use_fast_optimization_target: true
  optimizer_algorithm: ipopt
  optimizer_derivative_dx: 1
  optimizer_convergence_criterion: 0.1
  optimizer_max_iterations: 2000
  optimizer_print_level: 0
  use_verbose_printing: false
  # model_file> subject01_simbody_adjusted.osim </model_file
  AnalysisSet Analyses:
    ProbeReporter MetabolicsReporter
    Kinematics: start_time=-infinity end_time=infinity step_interval=10 in_degrees=true coordinates=all
    Actuation: start_time=-infinity end_time=infinity step_interval=10 in_degrees=true
    ProbeReporter MetabolicsReporter
  # external_loads_file> subject01_walk1_grf.xml </external_loads_file
  # constraints_file> gait2392_CMC_ControlConstraints.xml </constraints_file
